a := 4
b := 6
y1(x) := sinh(x) + e^x
y2(x) := cosh(x) + e^(-x)
y3(x) := e^x
y(x) := (x + 1)/((x^2 - 3*x)*(x - 0.3))
t(x) := 0.3
g(x) := sin(a*x)*cos(b*x)
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f(x) := limit(y(x)/x, x → ∞)*x + limit(y(x) - x, x → ∞) → -∞
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a := 2
b := 4
y1(x) := sinh(x) + e^x
y2(x) := cosh(x) + e^(-x)
y3(x) := e^x
z(x) := sin(a*x)*cos(b*x)
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