ORIGIN := 1
# Задание 1
V := [3 + 12 + 1; 3 + 12 + 2] = [16; 17]
M := [3 + 12 + 1, 3 + 12 + 2; 3 + 12 + 3, 3 + 12 + 4] = [16, 17; 18, 19]
# Задание 2
Г := 3
N := 12
a := Г*N = 36
b := Г + N = 15
M1 := [(a + b)/2, (a - b)/2; 2/(a + b), 2/(a - b)] = [25.5, 10.5; 0.0392157, 0.0952381]
M1 → [25.5, 10.5; 0.0392156862745, 0.0952380952381]
# Задание 3
M2[2, 2] := Г + N + 5
M2[3, 3] := Г + N + 9
M2[1, 1] := Г + N + 1
M2[2, 3] := Г + N + 6
M2[1, 2] := Г + N + 2
M2[3, 1] := Г + N + 7
M2[1, 3] := Г + N + 3
M2[3, 2] := Г + N + 8
M2[2, 1] := Г + N + 4
M2 = [16, 17, 18; 19, 20, 21; 22, 23, 24]
M2 → [16, 17, 18; 19, 20, 21; 22, 23, 24]
# Задание 4
V1 := M[:, 2] = [17; 19]
V2 := transpose(M2)[:, 2] = [19; 20; 21]
transpose(V2) = [19, 20, 21]
# Задание 5
i1 := 1 .. 8
j1 := i1
i3 := 1 .. 4
S[i1, j1] := N*i1 + Г*j1
S = [
    15, 18, 21, 24, 27, 30, 33, 36;
    27, 30, 33, 36, 39, 42, 45, 48;
    39, 42, 45, 48, 51, 54, 57, 60;
    51, 54, 57, 60, 63, 66, 69, 72;
    63, 66, 69, 72, 75, 78, 81, 84;
    75, 78, 81, 84, 87, 90, 93, 96;
    87, 90, 93, 96, 99, 102, 105, 108;
    99, 102, 105, 108, 111, 114, 117, 120
]
X[i3] := 2*Г*i3 + 2*N
Y[i3] := X[i3]^2
X = [30; 36; 42; 48]
Y = [900; 1296; 1764; 2304]
A[i3, 1] := X[i3]
A[i3, 2] := Y[i3]
A = [30, 900; 36, 1296; 42, 1764; 48, 2304]
WRITEPRN("Matrix1") := A
R[i1, j1] := S[i1, j1]^2
WRITEPRN("Matrix2") := S
R = [
    225, 324, 441, 576, 729, 900, 1089, 1296;
    729, 900, 1089, 1296, 1521, 1764, 2025, 2304;
    1521, 1764, 2025, 2304, 2601, 2916, 3249, 3600;
    2601, 2916, 3249, 3600, 3969, 4356, 4761, 5184;
    3969, 4356, 4761, 5184, 5625, 6084, 6561, 7056;
    5625, 6084, 6561, 7056, 7569, 8100, 8649, 9216;
    7569, 8100, 8649, 9216, 9801, 10404, 11025, 11664;
    9801, 10404, 11025, 11664, 12321, 12996, 13689, 14400
]
WRITEPRN("Matrix3") := R
# Задание 6
A2 := READPRN("ВАРИАНТ_12.prn")
A2 = [
    29.1, 44.02, 58.94, 73.86, 88.78, 103.71, 118.63, 133.55, 148.47;
    43.27, 58.19, 73.11, 88.03, 102.96, 117.88, 132.8, 147.72, 162.64;
    57.44, 72.36, 87.29, 102.21, 117.13, 132.05, 146.97, 161.9, 176.82;
    71.61, 86.54, 101.46, 116.38, 131.3, 146.22, 161.15, 176.07, 190.99;
    85.79, 100.71, 115.63, 130.55, 145.48, 160.4, 175.32, 190.24, 205.16;
    99.96, 114.88, 129.81, 144.73, 159.65, 174.57, 189.49, 204.42, 219.34
]
# Задание 7
L := [
    12 + 3 + 1, 12 + 3 + 2, 12 + 3 + 3;
    12 + 3 + 4, 12 + 3 + 5, 12 + 3 + 6;
    12 + 3 + 7, 12 + 3 + 8, 12 + 3 + 9
] = [16, 17, 18; 19, 20, 21; 22, 23, 24]
K := [0, -1, -2; 1, 0, -1; 2, 1, 0]
L + K = [16, 16, 16; 20, 20, 20; 24, 24, 24]
i := 1 .. 2
j := 1 .. 2
M3[i, j] := L[i, j] + K[i, j]
M3 = [16, 16; 20, 20]
L - K = [16, 18, 20; 18, 20, 22; 20, 22, 24]
M4[i, j] := L[i, j] - K[i, j]
M4 = [16, 18; 18, 20]
N + L = [28, 29, 30; 31, 32, 33; 34, 35, 36]
M5[i, j] := N + L[i, j]
M5 = [28, 29; 31, 32]
A3 := [N + Г + 1, N + Г + 3, N + Г + 5, N + Г + 7; N + Г + 2, N + Г + 4, N + Г + 6, N + Г + 8]
B3 := [N + Г + 1, N + Г + 5; N + Г + 2, N + Г + 6; N + Г + 3, N + Г + 7; N + Г + 4, N + Г + 8]
C3 := A3*B3
C3 = [1340, 1644; 1410, 1730]
sum(A3*B3, j = 1 .. 1) = [1340, 1644; 1410, 1730]
-L → [-16, -17, -18; -19, -20, -21; -22, -23, -24]
T := -N*L = [-192, -204, -216; -228, -240, -252; -264, -276, -288]
L*(-1) → [-16, -17, -18; -19, -20, -21; -22, -23, -24]
-N*L = [-192, -204, -216; -228, -240, -252; -264, -276, -288]
|C3| = 160
|V| → sqrt(545)
|V| = 23.3452
|C3| → 160
|C3| → 160
|V| =  # error: Эта матрица должна быть квадратной.
|C3| = 160
|V| → sqrt(545)
X := [N + Г + 1; N + Г + 2; N + Г + 3] = [16; 17; 18]
Y := [N + Г + 5; N + Г + 6; N + Г + 7] = [20; 21; 22]
X*Y = 1073
sum(X[j]*Y[j], j = 1 .. 3) = 1073
Z := X×Y = [-4; 8; -4]
Z := [
    X[2, 1]*Y[3, 1] - Y[2, 1]*X[3, 1];
    -(X[1, 1]*Y[3, 1] - X[3, 1]*Y[1, 1]);
    X[1, 1]*Y[2, 1] - X[2, 1]*Y[1, 1]
] = [-4; 8; -4]
transpose(X) = [16, 17, 18]
|X| = 29.4788
X = [16; 17; 18]
|Y| = 36.4005
ϕ := acos(X*Y/(|X|*|Y|)) = 0.00913112
Z = [-4; 8; -4]
|Z| = 9.79796
|Z| := |X|*|Y|*sin(ϕ)  # error: Здесь требуется имя.
Z[1] := (-1)^(1 - 1)*[X[2, 1], X[3, 1]; Y[2, 1], Y[3, 1]] = [17, 18; 21, 22]
Z[2] := (-1)^(2 - 1)*[X[1, 1], X[3, 1]; Y[2, 1], Y[3, 1]] = [-16, -18; -21, -22]
Z[3] := (-1)^(3 - 1)*[X[1, 1], X[2, 1]; Y[1, 1], Y[2, 1]] = [16, 17; 20, 21]
sum(X) + sum(Y) = 114
X[1] + X[2] + X[3] + Y[1] + Y[2] + Y[3] = 114
tr(L) = 60
sum(L[j, j], j = 1 .. 2) = 36
M6 := [0, N*π/3; N*π/2, N*π] = [0, 12.5664; 18.8496, 37.6991]
vectorize(sin(M6)) = [0, -4.89843e-16; -7.34764e-16, -1.46953e-15]
A4 := [Г + N + 1, Г + N + 4, Г + N + 2; Г + N + 3, Г + N + 0, Г + N + 1; Г + N + 7, Г + N + 8, Г + N + 9] = [16, 19, 17; 18, 15, 16; 22, 23, 24]
A4^-1 → [2/55, 13/44, -49/220; 4/11, -1/22, -5/22; -21/55, -5/22, 51/110]
|A4| → -220
B4[i, j] := (-1)^(i + j)*минор/|A4|  # error: Эта переменная неопределена.
B5 := mod(N, 7) = 5
B5 := identity(mod(N, 5) + 2) = [1, 0, 0, 0; 0, 1, 0, 0; 0, 0, 1, 0; 0, 0, 0, 1]
A4*A4^-1 = [1, 0, 0; 0, 1, 0; 0, 0, 1]
A4^0 = [1, 0, 0; 0, 1, 0; 0, 0, 1]
V5 := [Г + N + 1; Г + N + 2; Г + N + 3] = [16; 17; 18]
C5 := diag(V5) = [16, 0, 0; 0, 17, 0; 0, 0, 18]
Z4 := submatrix(A4, 2, 3, 2, 3) = [15, 16; 23, 24]
Z5 := submatrix(A4, 3, 3, 2, 3) = [23, 24]
Z6 := submatrix(A4, 1, 3, 2, 2) = [19; 15; 23]
A4 = [16, 19, 17; 18, 15, 16; 22, 23, 24]
F := augment(V5, Z, Z6) = [16, [17, 18; 21, 22], 19; 17, [-16, -18; -21, -22], 15; 18, [16, 17; 20, 21], 23]
L = [16, 17, 18; 19, 20, 21; 22, 23, 24]
L1 := [11, 12, 0; 13, 14, 0; 0, 0, 0] = [11, 12, 0; 13, 14, 0; 0, 0, 0]
G := stack(A4, L1) = [16, 19, 17; 18, 15, 16; 22, 23, 24; 11, 12, 0; 13, 14, 0; 0, 0, 0]
csort(G, 3) = [13, 14, 0; 0, 0, 0; 11, 12, 0; 18, 15, 16; 16, 19, 17; 22, 23, 24]
rsort(G, 6) = [19, 17, 16; 15, 16, 18; 23, 24, 22; 12, 0, 11; 14, 0, 13; 0, 0, 0]
V6 := [6*mod(N, 3) + 1; 2*mod(N, 4) + 1; 8*mod(N, 5) + 1] = [1; 1; 17]
# Задание 8
sort(V6) = [1; 1; 17]
reverse(V6) = [17; 1; 1]
K := [1, 5, 3, -4; 3, 1, -2, 0; 5, -7, 4, 0; 3, -5, 0, 0]
D := [2; -1; -1; 1]
lsolve(K, D) = [-0.5; -0.5; -0.5; -1.625]
ORIGIN := 1
X := K^-1*D
X = [-0.5; -0.5; -0.5; -1.625]
a := 0
b := 0
c := 0
d := 0
Given
a + 5b + 3c - 4d == 2
3a + b - 2c == -1
5a - 7b + 4d == -1
3b - 5c == 1
Find(a, b, c, d) =  # error: Эта переменная неопределена.
